OpenVSP model (file version 5), 17 components.
Geometry view with OpenVSP parameter names; values to 6 digits, angles in degrees, lengths in the model's unit.
Overall bounding box: X_Min=-0.017767 X_Len=30.0178 Y_Min=-21.5 Y_Len=43 Z_Min=-2.19649 Z_Len=10.2579

Fuselage "CrewCapsule"
  location (X Y Z) 0.5 0 0, rotation 0 0 0
  bounding box size 10.7855 3.37973 3.5
  Design: Length=9.75
  cross sections:
    n  XLocPercent  YLocPercent  ZLocPercent  shape
    0  0            0            0            circle Circle_Diameter=2.5
    1  0.25         0            0            ellipse Ellipse_Height=3.5 Ellipse_Width=3
    2  0.5          0            0            as above
    3  0.75         0            0            as above
    4  1            0            0            circle Circle_Diameter=2.5

Human "Pilot", child of "CrewCapsule"
  location (X Y Z) 4.80435 0 -0.652174, rotation 0 31.0326 0
  bounding box size 4.67588 1.9431 3.09136
  mass: Density=68.9874 Shell_Flag=0 Mass_Area=1 Mass_Prior=0
  Anthropometric: Age=30 AutoDensity=1 BMI=27.7 BMI_pct=0.5 GenderFlag=0 LenUnit=4 Mass=212.841 MassUnit=3 SitFrac=0.51 Stature=6.125 Stature_pct=0.926198 Volume=3.08522

Custom "PilotSeat", child of "CrewCapsule"
  location (X Y Z) 4.5 0 -1.5, rotation 0 -90 0
  bounding box size 2.91432 2 2.95892
  Design: BackAngle=27 BackHeight=2.9 BackThick=0.25 SeatHeight=0.25 SeatLength=1.5 Width=2
  custom script Seat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

Human "Passenger", child of "CrewCapsule"
  location (X Y Z) 8.30435 0 -0.652174, rotation 0 31.0326 0
  bounding box size 4.12497 1.9431 3.31283
  mass: Density=69.5565 Shell_Flag=0 Mass_Area=1 Mass_Prior=0
  Anthropometric: Age=30 AutoDensity=1 BMI=27.7 BMI_pct=0.5 GenderFlag=0 LenUnit=4 Mass=212.841 MassUnit=3 SitFrac=0.51 Stature=6.125 Stature_pct=0.926198 Volume=3.05998

Custom "PassengerSeat", child of "CrewCapsule"
  location (X Y Z) 8 0 -1.5, rotation 0 -90 0
  bounding box size 2.91432 2 2.95892
  Design: BackAngle=27 BackHeight=2.9 BackThick=0.25 SeatHeight=0.25 SeatLength=1.5 Width=2
  custom script Seat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

Wing "MainWing1.0.0"
  location (X Y Z) 3 0 2.75, rotation 0 0 0
  symmetric about XZ
  bounding box size 10.7106 42.487 4.18427
  totals: TotalSpan=47.2 TotalProjectedSpan=41.8635 TotalChord=5.5725 TotalArea=326.244 TotalAR=5.37191 MAC=7.61407
  root: chord 10.71, twist 0, NACA 4-series Camber=0 CamberLoc=0.2 ThickChord=0.1
  sections:
    n  Span  Root_Chord  Tip_Chord  Area    Sweep  Sweep_Location  Dihedral  Twist  Twist_Location  tip airfoil
    1  20    10.71       4.29       150     0      0.25            0         0      0.25            NACA 4-series Camber=0.0398571 CamberLoc=0.377143 ThickChord=0.121429
    2  3.6   4.29        3          13.122  0      0.25            -75       0      0.25            as above
  SS_Control "SS_CONT_0": UStart=0.387255 UEnd=0.485294 Length_C_Start=0.22 Length_C_End=0.22 Length_Start=1.58076 Length_End=1.02688 LE_Flag=0 Surf_Type=2
  SS_Control "SS_CONT_1": UStart=0.279412 UEnd=0.362745 Length_C_Start=0.25 Length_C_End=0.25 Length_Start=2.48868 Length_End=1.95368 LE_Flag=0 Surf_Type=2

Pod "Engines", child of "MainWing1.0.0"
  location (X Y Z) 1.5 6 4.5, rotation 0 0 0
  symmetric about XZ
  bounding box size 6 13.7143 1.71429
  Design: FineRatio=7 Length=6

Propeller "PropGeom", child of "Engines"
  location (X Y Z) 1.5 6 4.5, rotation 0 0 0
  symmetric about XZ
  bounding box size 0.350834 19.1228 7.12281
  Design: Diameter=7.11 NumBlade=4 Beta34=20 UseBeta34Flag=1 Feather=0 Rotate=0 Precone=0 ReverseFlag=0 FoldAngle=0 PropMode=0 AF=152.389 CLi=0.540495 Chord=0.174297 Solidity=0.221922 ConstructXoC=0.5 FeatherAxisXoC=0.5 FeatherOffsetXoC=0
  cross sections:
    n  RadiusFrac  shape
    0  0.04        ellipse Ellipse_Height=0.1422 Ellipse_Width=0.2844
    1  0.4         NACA 16-series Chord=0.647842 IdealCl=0.7 ThickChord=0.144074
    2  1           NACA 16-series Chord=0.46215 IdealCl=0.2 ThickChord=0.03
  Chord along r/R (cubic Bezier): 0.04: 0.08, 0.226667: 0.15, 0.413333: 0.2, 0.6: 0.2, 0.716667: 0.2, 0.833333: 0.2, 0.95: 0.2, 0.966667: 0.2, 0.983333: 0.2, 1: 0.13
  Twist along r/R (PCHIP): 0.04: 46.75, 0.75: 20, 1: 13
  Thick along r/R (cubic Bezier): 0.04: 0.5, 0.126667: 0.3, 0.213333: 0.225, 0.3: 0.2, 0.4: 0.125, 0.5: 0.115, 0.6: 0.1, 0.733333: 0.075, 0.866667: 0.055, 1: 0.03
  CLI along r/R (cubic Bezier): 0.04: 0, 0.16: 0.7, 0.28: 0.7, 0.4: 0.7, 0.466667: 0.7, 0.533333: 0.7, 0.6: 0.7, 0.733333: 0.7, 0.866667: 0.7, 1: 0.2

Wing "EnginePylon", child of "Engines"
  location (X Y Z) 3.75 6 2.75, rotation 90 0 0
  symmetric about XZ
  bounding box size 3 12.7205 1.5
  totals: TotalSpan=3 TotalProjectedSpan=3 TotalChord=2.75 TotalArea=8.25 TotalAR=1.09091 MAC=2.75758
  root: chord 3, twist 0, NACA 4-series Camber=0 CamberLoc=0.2 ThickChord=0.24
  sections:
    n  Span  Root_Chord  Tip_Chord  Area   Sweep  Sweep_Location  Dihedral  Twist  Twist_Location  tip airfoil
    1  1.5   3           2.5        4.125  10     0               0         0      0.25            NACA 4-series Camber=0 CamberLoc=0.2 ThickChord=0.1

Fuselage "WingConnector", child of "MainWing1.0.0"
  location (X Y Z) 2.75 0 2.25, rotation 0 0 0
  bounding box size 20.75 2.30815 2.07593
  Design: Length=20.75
  cross sections:
    n  XLocPercent  YLocPercent  ZLocPercent  shape
    0  0            0            0.0190293    point
    1  0.25         0            0            edit curve Width=2 Height=0.75 AbsoluteFlag=0 SymType=1 linear points (X Y): 0.388158 0, 0.286184 -0.797697, 0 -0.797697, -0.286184 -0.797697, -0.388158 0, -0.605263 0.600329, 0 0.5, 0.605263 0.600329, 0.388158 0
    2  0.5          0            0            edit curve Width=2.5 Height=0.8 AbsoluteFlag=0 SymType=1 linear points (X Y): 0.388158 0, 0.286184 -0.797697, 0 -0.797697, -0.286184 -0.797697, -0.388158 0, -0.605263 0.600329, 0 0.5, 0.605263 0.600329, 0.388158 0
    3  0.75         0            0            ellipse Ellipse_Height=1 Ellipse_Width=0.5
    4  0.875        0            0            as above
    5  0.9375       0            0            ellipse Ellipse_Height=1 Ellipse_Width=0.45
    6  1            0            -0.0233427   point

Pod "Floats", child of "MainWing1.0.0"
  location (X Y Z) 4 21 -1, rotation 0 0 0
  symmetric about XZ
  bounding box size 5 43 1
  Design: FineRatio=10 Length=5

Wing "HorizontalStabilizer1.0.0"
  location (X Y Z) 23 0 4.75, rotation 0 0 0
  symmetric about XZ
  bounding box size 7.00299 12.4241 0.708876
  totals: TotalSpan=12 TotalProjectedSpan=12 TotalChord=5.69 TotalArea=68.28 TotalAR=2.10896 MAC=5.79053
  root: chord 7, twist 0, NACA 4-series Camber=0 CamberLoc=0.2 ThickChord=0.1
  sections:
    n  Span  Root_Chord  Tip_Chord  Area   Sweep  Sweep_Location  Dihedral  Twist  Twist_Location  tip airfoil
    1  6     7           4.38       34.14  10     0.25            0         0      0.25            as above
  SS_Control "SS_CONT_0": UStart=0.4 UEnd=0.6 Length_C_Start=0.25 Length_C_End=0.25 Length_Start=1.619 Length_End=1.226 LE_Flag=0 Surf_Type=2

Wing "VerticalStabilizer1.0.0"
  location (X Y Z) 22 0 1.25, rotation 90 0 0
  bounding box size 8 0.800464 3.84345
  totals: TotalSpan=3.5 TotalProjectedSpan=3.5 TotalChord=7.5 TotalArea=26.25 TotalAR=0.466667 MAC=7.51111
  root: chord 8, twist 0, NACA 4-series Camber=0 CamberLoc=0.2 ThickChord=0.1
  sections:
    n  Span  Root_Chord  Tip_Chord  Area   Sweep  Sweep_Location  Dihedral  Twist  Twist_Location  tip airfoil
    1  3.5   8           7          26.25  0      1               0         0      0.25            as above
  SS_Control "SS_CONT_0": UStart=0.4 UEnd=0.6 Length_C_Start=0.25 Length_C_End=0.25 Length_Start=1.95 Length_End=1.8 LE_Flag=0 Surf_Type=2

Fuselage "MainFuselage"
  location (X Y Z) 0 0 0, rotation 0 0 0
  bounding box size 22 4 4.26316
  Design: Length=22
  cross sections:
    n  XLocPercent  YLocPercent  ZLocPercent  shape
    0  0            0            0            point
    1  0.0166667    0            0            circle Circle_Diameter=1.48388
    2  0.125        0            -0.00833333  edit curve Width=4 Height=4.5 AbsoluteFlag=0 SymType=1 cubic Bezier points (X Y): 0.5 0, 0.424342 -0.335526, 0.0756579 -0.269737, 0 -0.447368, -0.0756579 -0.269737, -0.424342 -0.335526, -0.5 0, -0.5 0.276142, -0.276142 0.5, 0 0.5, 0.276142 0.5, 0.5 0.276142, 0.5 0
    3  0.25         0            -0.00833333  as above
    4  0.375        0            -0.00833333  edit curve Width=3 Height=4.5 AbsoluteFlag=0 SymType=1 cubic Bezier points (X Y): 0.5 0, 0.424342 -0.335526, 0.0756579 -0.269737, 0 -0.447368, -0.0756579 -0.269737, -0.424342 -0.335526, -0.5 0, -0.5 0.276142, -0.276142 0.5, 0 0.5, 0.276142 0.5, 0.5 0.276142, 0.5 0
    5  0.63627      0            -0.00833333  edit curve Width=2.25 Height=4.5 AbsoluteFlag=0 SymType=1 cubic Bezier points (X Y): 0.5 0, 0.368421 -0.319079, 0.144737 -0.328947, 0 -0.447368, -0.144737 -0.328947, -0.368421 -0.319079, -0.5 0, -0.5 0.276142, -0.276142 0.5, 0 0.5, 0.276142 0.5, 0.5 0.276142, 0.5 0
    6  1            0            -0.00696955  edit curve Width=2 Height=4 AbsoluteFlag=0 SymType=1 cubic Bezier points (X Y): 0.5 0, 0.368421 -0.319079, 0.144737 -0.328947, 0 -0.447368, -0.144737 -0.328947, -0.368421 -0.319079, -0.5 0, -0.5 0.276142, -0.276142 0.5, 0 0.5, 0.276142 0.5, 0.5 0.276142, 0.5 0

Custom "Battery", child of "MainFuselage"
  location (X Y Z) 10.25 0 0, rotation 0 0 0
  bounding box size 5 2 2
  Design: Height=2 Length=5 SquareFlag=0 Width=2
  custom script Box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

Fuselage "FuselageGeom", child of "MainFuselage"
  location (X Y Z) 22 0 0, rotation 0 0 0
  bounding box size 8 2 3.78947
  Design: Length=8
  cross sections:
    n  XLocPercent  YLocPercent  ZLocPercent  shape
    0  0            0            -0.0191667   edit curve Width=2 Height=4 AbsoluteFlag=0 SymType=1 cubic Bezier points (X Y): 0.5 0, 0.368421 -0.319079, 0.144737 -0.328947, 0 -0.447368, -0.144737 -0.328947, -0.368421 -0.319079, -0.5 0, -0.5 0.276142, -0.276142 0.5, 0 0.5, 0.276142 0.5, 0.5 0.276142, 0.5 0
    1  1            0            0.0625       edit curve Width=0.25 Height=2 AbsoluteFlag=0 SymType=1 cubic Bezier points (X Y): 0.5 0, 0.368421 -0.319079, 0.144737 -0.328947, 0 -0.447368, -0.144737 -0.328947, -0.368421 -0.319079, -0.5 0, -0.5 0.276142, -0.276142 0.5, 0 0.5, 0.276142 0.5, 0.5 0.276142, 0.5 0

NGonMesh "MeshGeom_NGon"
  location (X Y Z) 0 0 0, rotation 0 0 0

VSPAERO settings (reference component "MainWing1.0.0"): Sref=326.244 bref=47.2 cref=7.61407 Xcg=0 Ycg=0 Zcg=0 AlphaStart=-5 AlphaEnd=12 AlphaNpts=18 BetaStart=0 BetaEnd=0 BetaNpts=1 MachStart=0.18 MachEnd=0 MachNpts=1 ReCref=1e+07 Vinf=100 Rho=0.002377
