OpenVSP model (file version 5), 7 components.
Geometry view with OpenVSP parameter names; values to 6 digits, angles in degrees, lengths in the model's unit.
Overall bounding box: X_Min=-0.0172745 X_Len=25.6051 Y_Min=-18.7214 Y_Len=37.4428 Z_Min=-1.1278 Z_Len=4.67451

Wing "WingGeom"
  location (X Y Z) 0 0 0, rotation 0 0 0
  symmetric about XZ
  bounding box size 25.6051 37.4428 4.43811
  totals: TotalSpan=41.7133 TotalProjectedSpan=36.7712 TotalChord=16.3402 TotalArea=647.211 TotalAR=2.08915 MAC=17.5297
  root: chord 25, twist 0, NACA 5-digit CamberLoc=0.15 IdealCl=0.3 ThickChord=0.12
  sections:
    n  Span     Root_Chord  Tip_Chord  Area     Sweep  Sweep_Location  Dihedral  Twist  Twist_Location  tip airfoil
    1  1        25          24.478     24.739   0      1               0         0      0.25            NACA 5-digit CamberLoc=0.2 IdealCl=0.3 ThickChord=0.12
    2  16.5227  24.478      8.56733    272.999  0      1               0         0      0.25            NACA 5-digit CamberLoc=0.206 IdealCl=0.3 ThickChord=0.12
    3  3.33393  8.56733     6.95033    25.8674  10     1               75        0      0.25            NACA 4-series Camber=0 CamberLoc=0.2 ThickChord=0.1

Human "HumanGeom", child of "WingGeom"
  location (X Y Z) 5.5 0 0.5, rotation 0 40 0
  bounding box size 4.47788 1.95419 3.10513
  mass: Density=68.3048 Shell_Flag=0 Mass_Area=1 Mass_Prior=0
  Anthropometric: Age=30 AutoDensity=1 BMI=25.7 BMI_pct=0.333423 GenderFlag=0 LenUnit=4 Mass=183.852 MassUnit=3 SitFrac=0.5 Stature=5.90997 Stature_pct=0.724 Volume=2.69164

Human "HumanGeom", child of "WingGeom"
  location (X Y Z) 9 0 1, rotation 0 20 0
  bounding box size 3.63452 2.08626 4.23624
  mass: Density=67.9223 Shell_Flag=0 Mass_Area=1 Mass_Prior=0
  Anthropometric: Age=30 AutoDensity=1 BMI=25.7 BMI_pct=0.333423 GenderFlag=0 LenUnit=4 Mass=183.852 MassUnit=3 SitFrac=0.5 Stature=5.90997 Stature_pct=0.724 Volume=2.7068

Fuselage "FuselageGeom", child of "WingGeom"
  location (X Y Z) 3.5 0 1.8, rotation 0 0 0
  bounding box size 13 2.92434 3.74355
  Design: Length=13
  cross sections:
    n  XLocPercent  YLocPercent  ZLocPercent  shape
    0  0            0            -0.00769231  point
    1  0.230769     0            0            edit curve Width=2.75 Height=3 AbsoluteFlag=0 SymType=1 cubic Bezier points (X Y): 0.417763 -0.00657895, 0.269737 -0.0888158, 0.275958 -0.131579, 0 -0.131579, -0.275958 -0.131579, -0.269737 -0.0888158, -0.417763 -0.00657895, -0.328947 0.243421, -0.275958 0.388158, 0 0.388158, 0.275958 0.388158, 0.328947 0.243421, 0.417763 -0.00657895
    2  0.442308     0            0            edit curve Width=3.5 Height=4.5 AbsoluteFlag=0 SymType=1 cubic Bezier points (X Y): 0.417763 -0.00657895, 0.269737 -0.0888158, 0.275958 -0.131579, 0 -0.131579, -0.275958 -0.131579, -0.269737 -0.0888158, -0.417763 -0.00657895, -0.328947 0.243421, -0.275958 0.388158, 0 0.388158, 0.275958 0.388158, 0.328947 0.243421, 0.417763 -0.00657895
    3  1            0            -0.05        point

Stack "StackGeom", child of "WingGeom"
  location (X Y Z) 12.5 3 1.3125, rotation 0 3 0
  symmetric about XZ
  bounding box size 7.64598 8.9529 3.34146
  cross sections:
    n  VAlign  XDelta   XRotateAbs  XSAbsRelFlag  YDelta  YRotateAbs  ZDelta  ZRotateAbs  shape
    0  0       0        0           1             0       0           0       0           circle Circle_Diameter=1.575
    1  0       3.75     0           1             0       0           0       0           circle Circle_Diameter=2.0625
    2  0       3.75     0           1             0       0           0       0           circle Circle_Diameter=1.425
    3  0       -1.875   0           1             0       0           0       0           circle Circle_Diameter=1.125
    4  0       -0.75    0           1             0       0           0       0           circle Circle_Diameter=1.5
    5  0       -0.9375  0           1             0       0           0       0           circle Circle_Diameter=1.425
    6  0       -3.9375  0           1             0       0           0       0           circle Circle_Diameter=1.575

Stack "StackGeom", child of "StackGeom"
  location (X Y Z) 11 3 1.3875, rotation 0 3 0
  symmetric about XZ
  bounding box size 1.58037 7.575 1.65135
  cross sections:
    n  VAlign  XDelta  XRotateAbs  XSAbsRelFlag  YDelta  YRotateAbs  ZDelta  ZRotateAbs  shape
    0  0       0       0           1             0       0           0       0           point
    1  0       0       0           0             0       0           0       0           circle Circle_Diameter=1.125
    2  0       1.5     0           1             0       0           0       0           circle Circle_Diameter=1.575
    3  0       0       0           1             0       0           0       0           point

Stack "StackGeom", child of "StackGeom"
  location (X Y Z) 20 3 0.9375, rotation 0 3 0
  symmetric about XZ
  bounding box size 4.38117 7.425 1.64875
  cross sections:
    n  VAlign  XDelta  XRotateAbs  XSAbsRelFlag  YDelta  YRotateAbs  ZDelta  ZRotateAbs  shape
    0  0       0       0           1             0       0           0       0           point
    1  0       0       0           1             0       0           0       0           circle Circle_Diameter=1.425
    2  0       4.3125  0           1             0       0           0       0           as above
    3  0       0       0           1             0       0           0       0           point
